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R1 := 10*10^3
R2 := 10*10^3
R3 := 10*10^3
Vpwr := 2.048
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Vdiff := -0.053798*(-1)
RQ := (R2*Vpwr - (R1 + R2)*Vdiff)/(R1*Vpwr + (R1 + R2)*Vdiff)*R3 → 9001.70532883
LSB := ((5/2^12) → 5/4096) = 0.0012207
2.49453/1000 = 0.00249453
R1 := 1*10^3
R2 := 1*10^3
R3 := 1*10^3
Vpwr := 5.0
Vdiff := -2.49439*(-1)
RQ := (R2*Vpwr - (R1 + R2)*Vdiff)/(R1*Vpwr + (R1 + R2)*Vdiff)*R3 → 1.12326029805
LSB := ((5/2^12) → 5/4096) = 0.0012207
2.49453/1000 = 0.00249453
R1 := 100
R2 := 100
R3 := 1*100
Vpwr := 5.0
Vdiff := -2.444552*(-1)
RQ := (R2*Vpwr - (R1 + R2)*Vdiff)/(R1*Vpwr + (R1 + R2)*Vdiff)*R3 → 1.12139583121
LSB := ((5/2^12) → 5/4096) = 0.0012207
2.49453/1000 = 0.00249453
