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R1 := 10*10^3
R2 := 10*10^3
R3 := 0.5*10^3
Vref := 2.048
25120/25135*100 - 100 = -0.0596777
Vpwr := Vref
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LSB := Vref/2^17 = 1.5625e-5
FullScale := 2^17
FS := FullScale
2^17 = 131072
# если
value_of_channel := 71040
тогда
Vout := value_of_channel/FS*Vref = 1.11
V0 := Vref/2 = 1.024
V1 := 0.00810816
Vdiff := V0 - V1
Vdiff → 1.01589184
RQ := ((R2*Vpwr - (R1 + R2)*Vdiff)/(R1*Vpwr + (R1 + R2)*Vdiff))*R3 → 1.98739948879
LSB := (2.048/2^18 → 0.0000078125) = 7.8125e-6
2.49453/1000 = 0.00249453
969.906*10^3/(1000*10^3)*100 = 96.9906
R1 := 1*10^3
R2 := 1*10^3
R3 := 1*10^3
Vpwr := 4.096
Vdiff := 0.683*(-1)
Rq := (R2*Vpwr - (R1 + R2)*Vdiff)/(R1*Vpwr + (R1 + R2)*Vdiff)*R3 → 2000.73260073
LSB := ((5/2^12) → 5/4096) = 0.0012207
2.49453/1000 = 0.00249453
2^16 = 65536
10922/65536*4.096 = 0.682625
R1 := 100
R2 := 100
R3 := 1*100
Vpwr := 5.0
Vdiff := -2.444552*(-1)
RQ := (R2*Vpwr - (R1 + R2)*Vdiff)/(R1*Vpwr + (R1 + R2)*Vdiff)*R3 → 1.12139583121
LSB := ((5/2^12) → 5/4096) = 0.0012207
2.49453/1000 = 0.00249453
